<?xml version="1.0" encoding="UTF-8"?>
<neuroml xmlns="http://morphml.org/neuroml/schema"
    xmlns:mml="http://morphml.org/morphml/schema"
    xmlns:meta="http://morphml.org/metadata/schema"
    xmlns:bio="http://morphml.org/biophysics/schema"
    xmlns:cml="http://morphml.org/channelml/schema"
    xmlns:xsi="http://www.w3.org/2001/XMLSchema-instance"
    xsi:schemaLocation="http://morphml.org/neuroml/schema http://www.neuroml.org/NeuroMLValidator/NeuroMLFiles/Schemata/v1.8.1/Level3/NeuroML_Level3_v1.8.1.xsd"
    name = "NeuroML Level 2 file exported from NEURON"
    lengthUnits="micron">

<meta:notes>NeuroML Level 2 file generated from ModelView by: NEURON -- Release 7.2 (551:9d708f513f8c) 2011-11-22
Authors: Michael Hines, Sushil Kambampati and Padraig Gleeson,
Yale University and UCL</meta:notes>

<cells>
  <cell name="dm1_combined_12_0">
    <meta:notes>Cell: dm1_combined_12_0 exported from NEURON ModelView</meta:notes>
    <segments  xmlns="http://morphml.org/morphml/schema"> <!-- Changing the namespace from neuroml to morphml-->
<!-- Section: dm1_combined_12[0].cable_0 -->
      <segment id="0" name = "Seg0_cable_0" cable = "0">
        <proximal x="65.1922" y="8.77256" z="21.4558" diameter="10.235"/>
        <distal x="65.1922" y="7.78887" z="21.6612" diameter="10.235"/>
      </segment>
<!-- Section: dm1_combined_12[0].cable_1151 -->
      <segment id="3255" name = "Seg0_cable_1151" parent="0" cable = "1151">  <!-- Connected at 0 on parent section: dm1_combined_12[0].cable_0  -->
        <proximal x="65.1922" y="8.77256" z="21.4558" diameter="10.235"/>
        <distal x="65.1922" y="9.45027" z="20.633" diameter="10.235"/>
      </segment>
<!-- Section: dm1_combined_12[0].cable_1 -->
      <segment id="2" name = "Seg0_cable_1" parent="0" cable = "1">  <!-- Parent section: dm1_combined_12[0].cable_0 -->
        <proximal x="65.1922" y="7.78887" z="21.6612" diameter="10.235"/>
        <distal x="65.1051" y="6.69747" z="21.3482" diameter="10.235"/>
      </segment>
      <segment id="3" name = "Seg1_cable_1" parent="2" cable = "1">
        <distal x="64.9322" y="5.67376" z="21.1657" diameter="10.235"/>
      </segment>
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    </segments>
    <cables  xmlns="http://morphml.org/morphml/schema"> <!-- Changing namespace from neuroml to morphml-->
      <cable id = "0" name = "cable_0" fract_along_parent = "0"/>
      <cable id = "1151" name = "cable_1151" fract_along_parent = "0"/>
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      <cablegroup name="all"> <!-- Replacing subset name ModelViewParmSubset_0 with all, as it contains all sections -->
        <cable id = "0"/>
        <cable id = "1151"/>
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      </cablegroup>
    </cables>
    <biophysics  units = "Physiological Units"> <!-- Note: values of cond dens are different in NEURON and phy units-->
      <bio:mechanism name="LeakConductance" type="Channel Mechanism" passive_conductance="true">
        <bio:parameter name="gmax" value="0.0480769">
          <bio:group>all</bio:group>
        </bio:parameter>
        <bio:parameter name="e" value="-60">
          <bio:group>all</bio:group>
        </bio:parameter>
      </bio:mechanism>
      <bio:mechanism name="atten" type="Channel Mechanism">
      </bio:mechanism>
      <bio:spec_capacitance>
        <bio:parameter value="0.79">
          <bio:group>all</bio:group>
        </bio:parameter>
      </bio:spec_capacitance>
      <bio:spec_axial_resistance>
        <bio:parameter value="0.2661">
          <bio:group>all</bio:group>
        </bio:parameter>
      </bio:spec_axial_resistance>
    </biophysics>
  </cell>
</cells>
</neuroml>
