<Lems xmlns="http://www.neuroml.org/lems/0.7.2" xmlns:xsi="http://www.w3.org/2001/XMLSchema-instance" xsi:schemaLocation="http://www.neuroml.org/lems/0.7.2  https://raw.githubusercontent.com/LEMS/LEMS/development/Schemas/LEMS/LEMS_v0.7.2.xsd">

    <Target component="sim1" reportFile="/home/padraig/git/Drosophila_Projection_Neuron/neuroConstruct/simulations/Sim_2/simulator.props" timesFile="/home/padraig/git/Drosophila_Projection_Neuron/neuroConstruct/simulations/Sim_2/time.dat"/>

        <!--Include standard NeuroML 2 ComponentType definitions-->

    <Include file="Cells.xml"/>
    <Include file="Networks.xml"/>
    <Include file="Simulation.xml"/>

        <!--Include the generated NeuroML 2 files-->

        <!--   Channel/synapse files-->
    <Include file="LeakConductance.channel.nml"/>
    <Include file="LeakConductance.channel.nml"/>
    <Include file="LeakConductance.channel.nml"/>
        <!--   Cell files-->
    <Include file="Figure4B1.cell.nml"/>
    <Include file="Figure4B2.cell.nml"/>
    <Include file="Figure4B3.cell.nml"/>
        <!--   Network file-->
    <Include file="Drosophila_Projection_Neuron.net.nml"/>

        <!--Note: this could be: Simulation id="sim1" ... , but Component type="Simulation" ...
        is used to allow validation of this file according to the LEMS schema specified above...-->
    <Component type="Simulation" id="sim1" length="100.0ms" step="0.025ms" target="network_Drosophila_Projection_Neuron">

        <Display id="F4B1_v" title="Drosophila_Projection_Neuron: Default Simulation Configuration, F4B1, VOLTAGE" xmin="-0.010000001" xmax="0.11000001" ymin="-0.104" ymax="0.064" timeScale="1s">
            <Line id="F4B1_0 v" timeScale="1s" quantity="F4B1/0/Figure4B1/0/v" scale="1 V" color="#000000"/>
        </Display>

        <Display id="F4B2_v" title="Drosophila_Projection_Neuron: Default Simulation Configuration, F4B2, VOLTAGE" xmin="-0.010000001" xmax="0.11000001" ymin="-0.104" ymax="0.064" timeScale="1s">
            <Line id="F4B2_0 v" timeScale="1s" quantity="F4B2/0/Figure4B2/0/v" scale="1 V" color="#000000"/>
        </Display>

        <Display id="F4B3_v" title="Drosophila_Projection_Neuron: Default Simulation Configuration, F4B3, VOLTAGE" xmin="-0.010000001" xmax="0.11000001" ymin="-0.104" ymax="0.064" timeScale="1s">
            <Line id="F4B3_0 v" timeScale="1s" quantity="F4B3/0/Figure4B3/0/v" scale="1 V" color="#000000"/>
        </Display>

        <OutputFile id="F4B1_v_0_0_OF" fileName="/home/padraig/git/Drosophila_Projection_Neuron/neuroConstruct/simulations/Sim_2/F4B1_0.0.dat">
            <OutputColumn id="v" quantity="F4B1/0/Figure4B1/0/v"/>
        </OutputFile>

        <OutputFile id="F4B2_v_0_0_OF" fileName="/home/padraig/git/Drosophila_Projection_Neuron/neuroConstruct/simulations/Sim_2/F4B2_0.0.dat">
            <OutputColumn id="v" quantity="F4B2/0/Figure4B2/0/v"/>
        </OutputFile>

        <OutputFile id="F4B3_v_0_0_OF" fileName="/home/padraig/git/Drosophila_Projection_Neuron/neuroConstruct/simulations/Sim_2/F4B3_0.0.dat">
            <OutputColumn id="v" quantity="F4B3/0/Figure4B3/0/v"/>
        </OutputFile>
    </Component>

</Lems>
